EFECTIVE_FREQ_VIBRATION := 1*10^13
TIME_FORMATION_O_VAC := 1*10^-9
HEIGHT_MIGRATION_BARRIER := 2.5*1.6*10^-19
FORMING_COEF_ENHANCEMENT := 32*10^-28
CONST_BOLTZMAN := 1.38*10^-23
T := 413.109595096
E := 107009095.773
exp(-(HEIGHT_MIGRATION_BARRIER - FORMING_COEF_ENHANCEMENT*E)/(CONST_BOLTZMAN*T)) = 4.11396e-5
P := EFECTIVE_FREQ_VIBRATION*TIME_FORMATION_O_VAC*exp(-(HEIGHT_MIGRATION_BARRIER - FORMING_COEF_ENHANCEMENT*E)/(CONST_BOLTZMAN*T)) = 0.411396
E := 2.5*10^-19
COEF := 10^-10/(0.52*30*10^-9) = 0.00641026
B := 40
qE := 1.6*10^-19
V := 7
COEF*B*qE*V = 2.87179e-19
P := exp((E - COEF*B*qE*V)/(CONST_BOLTZMAN*T)) = 0.00147121
