TIME_FORMATTION_O_VAC := 1*10^-11
CHARGE_E := 1.6*10^-19
CONST_BOLTZMAN := 1.38*10^-23
u := 1
LATTICE_CONST := 623*10^-12
EFECTIVE_FREQ_VIBRATION := 1*10^13
HEIGHT_MIGRATION_BARRIER := 2.5*1.6*10^-19
T := 610
T := 590
E := -4494382022
E := -3531300160
CONCENTRATION_DECAYING_LENGHT_IONS := 0.5*10^-44
DRIFT_COEF := 3.6*10^-10
sinh(CHARGE_E*DRIFT_COEF*E/(CONST_BOLTZMAN*T)) = -3.53578e10
RECOMBINATION_ENHANCEMENT_FACTOR := 1*10^18
v := LATTICE_CONST/EFECTIVE_FREQ_VIBRATION*exp(-HEIGHT_MIGRATION_BARRIER/(CONST_BOLTZMAN*T))*sinh(CHARGE_E*DRIFT_COEF*E/(CONST_BOLTZMAN*T)) = -1.01616e-33
exp((-v*TIME_FORMATTION_O_VAC)/CONCENTRATION_DECAYING_LENGHT_IONS) = 7.63181
β := RECOMBINATION_ENHANCEMENT_FACTOR*exp((-v*TIME_FORMATTION_O_VAC)/CONCENTRATION_DECAYING_LENGHT_IONS)*u = 7.63181e18
P_R0 := EFECTIVE_FREQ_VIBRATION*TIME_FORMATTION_O_VAC*exp(-HEIGHT_MIGRATION_BARRIER/(CONST_BOLTZMAN*T)) = 4.61307e-20
P_R := P_R0*β = 0.352061
