e := 1.6*10^-19
T := 598
F := 4815409309
s := 6.23*10^-10
W := 0.2*e
ε_∞ := 99
T := 394
F := 16604859
s := 1.225*10^-9
h := 6.62*10^-34
ε_0 := 8.85*10^-12
β := sqrt(e^3/(π*ε_0*ε_∞)) = 1.21988e-24
s := 623*10^-12
K := 1.38*10^-23
j := e/s^2*W/h*exp(-(W - β*sqrt(F))/(K*T))*tanh(e*F*s/(2*K*T)) = 2.08736e10
exp(-(W - β*sqrt(F))/(K*T)) = 0.00693519
tanh(e*F*s/(2*K*T)) = 0.151044
e/s^2*W/h = 1.99267e13
