q := 1.6*10^-19
ε_0 := 8.85*10^-12
k := 1.38*10^-23
ϕ_PF := 2.5*q
ε_d := 4.2*10^37
E := 16604859
T := 394
E := 4815409309
T := 598
I := E*exp(-q*(ϕ_PF - sqrt((q*E)/(π*ε_0*ε_d)))/(k*T)) = 4815409309
sqrt((q*E)/(π*ε_0*ε_d)) = 8.12279e-19
ϕ_PF - sqrt((q*E)/(π*ε_0*ε_d)) = -4.12279e-19
